# define the attributes associated with the particles,
# 'granular' (or 'sphere') style uses diameter, mass and angular velocity
atom_style      granular

processors * 1 1

# use an array to map particle IDs to local storage index,
# do not sort atoms spatially
atom_modify     map array sort 0 0

# set simulation domain to be fixed in x y z
boundary        f f f

# save communication by turning off Newton's 3rd law for pairwise interaction,
# note: this setting only influences communication between procs, Newton's
# 3rd law is still used for contact force calculations
newton          off

# use a single value for ghost particle cutoff distance and
# enable velocity to be communicated with ghost particles
communicate     single vel yes

# set unit system to SI
units           si

# define the region used as simulation domain (min/max X, min/max Y, min/max Z)
region          domain block -0.1 0.1 -0.1 0.1 -0.1 0.1 units box

# create the simulation domain and 1 material type for particles and walls
create_box      1 domain

# specify the skin distance for neighbor list generation
neighbor        0.001 bin
neigh_modify    delay 0

variable vel1            equal  10.0 # (m/s)
variable vel2            equal -10.0 # (m/s)

# particle size and density
variable rad             equal  0.01 # 10 mm
variable dia1            equal  2*${rad}
variable dia2             equal  4*${rad}
variable dens            equal  2800 # kg/m3

fix     m1 all property/global youngsModulus peratomtype 4.8e10
fix     m2 all property/global poissonsRatio peratomtype 0.2
fix     m3 all property/global coefficientRestitution peratomtypepair 1 1.0
fix     m4 all property/global coefficientFriction peratomtypepair 1 0.35


# specify contact model to use
pair_style gran model hertz tangential incremental_history limitForce on
pair_coeff * *

# set the time step to ~1% of Rayleigh time
variable    dt equal 0.0000001
timestep    ${dt}
print "timestep ${dt}"

# create two particles of type 1 at the given positions
# by default particles are assigned to a group named 'all'
create_atoms    1 single -0.015 0.0 0.0 units box
create_atoms    1 single  0.03 0.0 0.0 units box
# set diameter, density and initial velocity of created particles
set             atom 1 diameter ${dia1} density ${dens} vx ${vel1}
set             atom 2 diameter ${dia2} density ${dens} vx ${vel2}

# declare radius dependent velocity variable
variable var atom radius*1000

# Fix velocity in y-direction and radius dependent velocity in z-direction, but x-direction stays untouched
fix vel all setvelocity NULL 7.0 v_var

# use constant NVE integration to update position, velocity and angular velocity
fix integr all nve/sphere

# check time step size
fix ts_check all check/timestep/gran 1 0.1 0.1


thermo_style    custom step atoms ke
thermo          1000
thermo_modify   lost ignore norm no
compute_modify  thermo_temp dynamic no

# print velocity components of particles
variable vx1 equal vx[1]
variable vy1 equal vy[1]
variable vz1 equal vz[1]
variable vx2 equal vx[2]
variable vy2 equal vy[2]
variable vz2 equal vz[2]

fix extra all print 1000 "vx1= ${vx1} vy1= ${vy1} vz1= ${vz1} | vx2= ${vx2} vy2= ${vy2} vz2= ${vz2}"

dump dmpvtk all custom/vtk 1000 post/dump*.vtk id type vx vy vz fx fy fz radius
dump_modify dmpvtk domainfile no

# run 600 time steps
run     20000

print "Energy after collision was at test: 26.025104"
